ORIGIN := 1  # задание 1 и 2
Γ := 3
Ν := 10
# задание 3
a := Γ*Ν = 30
b := Γ + Ν = 13
a11 := (a + b)/2
V := [Γ + Ν + 1; Γ + Ν + 2]
M := [Γ + Ν + 1, Γ + Ν + 2; Γ + Ν + 3, Γ + Ν + 4]
M1 := [(a + b)/2, (a - b)/2; 2/(a + b), 2/(a - b)]
M1 = [21.5, 8.5; 0.0465116, 0.117647]
cols(V) = 1
cols(M) = 2
|V| = 20.5183
V = [14; 15]
rows(V) = 2
rows(M) = 2
length(V) = 2
|M1| = 2.13406
M1 → [43/2, 17/2; 2/43, 2/17]
|M| = -2
M = [14, 15; 16, 17]
last(V) = 2
|M1| → 1560/731 = 2.13406
# команда Origin меняет показатель отсчета изначально он 0, теперь он изменен на 1
M1[1, 1] = 21.5
M1[1, 1] → 43/2
M1[1, 2] = 8.5
M1[1, 2] → 17/2
# задание 4
M1[2, 1] = 0.0465116
M1[2, 1] → 2/43
M2[1, 1] := Γ + Ν + 1
M2[2, 1] := Γ + Ν + 3
M1[2, 2] = 0.117647
M1[2, 2] → 2/17
M2[2, 2] := Γ + Ν + 4
M2[1, 2] := Γ + Ν + 2
M2 := [M2[1, 1], M2[1, 2]; M2[2, 1], M2[2, 2]] = [14, 15; 16, 17]
M2 = [14, 15; 16, 17]
# задание 5
V1 := M[:, 2] = [15; 17]
transpose(V1) = [15, 17]
V2 := transpose(M)[:, 2] = [16; 17]
# задание 6
i1 := 1 .. 8
j1 := i1
i3 := 1 .. 4
S[i1, j1] := Γ*i1 + Ν*j1
S = [
    13, 23, 33, 43, 53, 63, 73, 83;
    16, 26, 36, 46, 56, 66, 76, 86;
    19, 29, 39, 49, 59, 69, 79, 89;
    22, 32, 42, 52, 62, 72, 82, 92;
    25, 35, 45, 55, 65, 75, 85, 95;
    28, 38, 48, 58, 68, 78, 88, 98;
    31, 41, 51, 61, 71, 81, 91, 101;
    34, 44, 54, 64, 74, 84, 94, 104
]
X[i3] := 2*Γ*i3 + 2*Ν
Y[i3] := X[i3]^2
X = [26; 32; 38; 44]
Y = [676; 1024; 1444; 1936]
A[i3, 1] := X[i3]
A[i3, 2] := Y[i3]
A = [26, 676; 32, 1024; 38, 1444; 44, 1936]
WRITEPRN("var10") := A
WRITEPRN("var10") := S
R[i1, j1] := S[i1, j1]^2
R = [
    169, 529, 1089, 1849, 2809, 3969, 5329, 6889;
    256, 676, 1296, 2116, 3136, 4356, 5776, 7396;
    361, 841, 1521, 2401, 3481, 4761, 6241, 7921;
    484, 1024, 1764, 2704, 3844, 5184, 6724, 8464;
    625, 1225, 2025, 3025, 4225, 5625, 7225, 9025;
    784, 1444, 2304, 3364, 4624, 6084, 7744, 9604;
    961, 1681, 2601, 3721, 5041, 6561, 8281, 10201;
    1156, 1936, 2916, 4096, 5476, 7056, 8836, 10816
]
WRITEPRN("var10") := R
# Задание 7
A22 := READPRN("ВАРИАНТ_10.prn")
A22 = [
    24.25, 36.68, 49.12, 61.55, 73.99, 86.42, 98.86, 111.29, 123.73;
    36.06, 48.49, 60.93, 73.36, 85.8, 98.23, 110.67, 123.1, 135.54;
    47.87, 60.3, 72.74, 85.17, 97.61, 110.04, 122.48, 134.91, 147.35;
    59.68, 72.11, 84.55, 96.98, 109.42, 121.85, 134.29, 146.72, 159.16;
    71.49, 83.93, 96.36, 108.8, 121.23, 133.67, 146.1, 158.54, 170.97;
    83.3, 95.74, 108.17, 120.61, 133.04, 145.48, 157.91, 170.35, 182.78
]
# Задание 8
a
L := [Ν + Γ + 1, Ν + Γ + 2, Ν + Γ + 3; Ν + Γ + 4, Ν + Γ + 5, Ν + Γ + 6; Ν + Γ + 7, Ν + Γ + 8, Ν + Γ + 9] = [14, 15, 16; 17, 18, 19; 20, 21, 22]
K := [0, -1, -2; 1, 0, -1; 2, 1, 0]
L + K = [14, 14, 14; 18, 18, 18; 22, 22, 22]
i := 1 .. 3
j := 1 .. 3
M3[i, j] := L[i, j] + K[i, j]
M3 = [14, 14, 14; 18, 18, 18; 22, 22, 22]
б
L - K = [14, 16, 18; 16, 18, 20; 18, 20, 22]
M4[i, j] := L[i, j] - K[i, j]
M4 = [14, 16, 18; 16, 18, 20; 18, 20, 22]
в
N := 10
N + L = [24, 25, 26; 27, 28, 29; 30, 31, 32]
M5[i, j] := N + L[i, j]
M5 = [24, 25, 26; 27, 28, 29; 30, 31, 32]
г
A3 := [N + Γ + 1, N + Γ + 3, N + Γ + 5, N + Γ + 7; N + Γ + 2, N + Γ + 4, N + Γ + 6, N + Γ + 8]
B3 := [N + Γ + 1, N + Γ + 5; N + Γ + 2, N + Γ + 6; N + Γ + 3, N + Γ + 7; N + Γ + 4, N + Γ + 8]
C3 := A3*B3
C3 = [1064, 1336; 1126, 1414]
sum(A3*B3, j = 1 .. 1) = [1064, 1336; 1126, 1414]
д
T := -N*L = [-140, -150, -160; -170, -180, -190; -200, -210, -220]
-L → [-14, -15, -16; -17, -18, -19; -20, -21, -22]
L*(-1) → [-14, -15, -16; -17, -18, -19; -20, -21, -22]
-N*L = [-140, -150, -160; -170, -180, -190; -200, -210, -220]
е
|C3| = 160
|V| → sqrt(421)
|V| → sqrt(421)
|C3| = 160
|C3| → 160
|V| = 20.5183
|C3| → 160
|V| =  # error: Эта матрица должна быть квадратной.
# V это вектор, а вектор не может быть квадратным
ж
X := [Ν + Γ + 1; Ν + Γ + 2; Ν + Γ + 3] = [14; 15; 16]
Y := [Ν + Γ + 5; Ν + Γ + 6; Ν + Γ + 7] = [18; 19; 20]
X*Y = 857
sum(X[j]*Y[j], j = 1 .. 3) = 857
з
Z := X×Y = [-4; 8; -4]
Z := [
    X[2, 1]*Y[3, 1] - Y[2, 1]*X[3, 1];
    -(X[1, 1]*Y[3, 1] - X[3, 1]*Y[1, 1]);
    X[1, 1]*Y[2, 1] - X[2, 1]*Y[1, 1]
] = [-4; 8; -4]
transpose(X) = [14, 15, 16]
|X| = 26.0192
|Y| = 32.9393
X = [14; 15; 16]
ϕ := acos(X*Y/(|X|*|Y|)) = 0.0114324
Z = [-4; 8; -4]
|Z| = 9.79796
Z1 := |X|*|Y|*sin(ϕ)
Z1 = 9.79796
Z2[1] := (-1)^(1 - 1)*[X[2, 1], X[3, 1]; Y[2, 1], Y[3, 1]] = [15, 16; 19, 20]
Z2[2] := (-1)^(2 - 1)*[X[1, 1], X[3, 1]; Y[2, 1], Y[3, 1]] = [-14, -16; -19, -20]
Z2[3] := (-1)^(3 - 1)*[X[1, 1], X[2, 1]; Y[1, 1], Y[2, 1]] = [14, 15; 18, 19]
и
sum(X) + sum(Y) = 102
X[1] + X[2] + X[3] + Y[1] + Y[2] + Y[3] = 102
к
tr(L) = 54
sum(L[j, j], j = 1 .. 2) = 32
л
M6 := [0, Ν*π/3; -Ν*π/2, Ν*π] = [0, 10.472; -15.708, 31.4159]
vectorize(sin(M6)) = [0, -0.866025; 0, 0]
м
A4 := [Γ + Ν + 1, Γ + Ν + 4, Γ + Ν + 2; Γ + Ν + 3, Γ + Ν + 0, Γ + Ν + 1; Γ + Ν + 7, Γ + Ν + 8, Γ + Ν + 9] = [14, 17, 15; 16, 13, 14; 20, 21, 22]
A4^-1 → [2/49, 59/196, -43/196; 18/49, -2/49, -11/49; -19/49, -23/98, 45/98]
|A4| → -196
A4^-1 = [0.0408163, 0.30102, -0.219388; 0.367347, -0.0408163, -0.22449; -0.387755, -0.234694, 0.459184]
B[1, 3] := (-1)^(1 + 3)*det([23, 21; 19, 20])/|A4| = -0.311224
B[1, 1] := (-1)^(1 + 1)*det([19, 20; 27, 28])/|A4|
B[1, 2] := (-1)^(1 + 2)*det([23, 21; 27, 28])/|A4|
B[2, 1] := (-1)^(2 + 1)*det([22, 20; 26, 28])/|A4|
B[2, 2] := (-1)^(2 + 2)*det([20, 21; 26, 28])/|A4|
B[2, 3] := (-1)^(2 + 3)*det([20, 21; 22, 20])/|A4|
B[3, 3] := (-1)^(3 + 3)*det([20, 23; 22, 19])/|A4| = 0.642857
B[3, 1] := (-1)^(3 + 1)*det([22, 19; 26, 27])/|A4|
B[3, 2] := (-1)^(3 + 2)*det([20, 23; 26, 27])/|A4|
B = [0.0408163, 0.392857, -0.311224; 0.489796, -0.0714286, -0.316327; -0.510204, -0.295918, 0.642857]
н
B5 := mod(N, 7) = 3
B5 := identity(mod(N, 5) + 2) = [1, 0; 0, 1]
A4*A4^-1 = [1, 0, 0; 0, 1, 0; 0, 0, 1]
о
A4^0 = [1, 0, 0; 0, 1, 0; 0, 0, 1]
V5 := [Γ + N + 1; Γ + N + 2; Γ + N + 3] = [14; 15; 16]
C5 := diag(V5) = [14, 0, 0; 0, 15, 0; 0, 0, 16]
п
Z4 := submatrix(A4, 2, 3, 2, 3) = [13, 14; 21, 22]
Z5 := submatrix(A4, 3, 3, 2, 3) = [21, 22]
Z6 := submatrix(A4, 1, 3, 2, 2) = [17; 13; 21]
р
F := augment(V5, Z, Z6) = [14, -4, 17; 15, 8, 13; 16, -4, 21]
A4 = [14, 17, 15; 16, 13, 14; 20, 21, 22]
с
L = [14, 15, 16; 17, 18, 19; 20, 21, 22]
G := stack(A4, L) = [14, 17, 15; 16, 13, 14; 20, 21, 22; 14, 15, 16; 17, 18, 19; 20, 21, 22]
т
csort(F, 2) = [14, -4, 17; 16, -4, 21; 15, 8, 13]
у
rsort(F, 3) = [-4, 14, 17; 8, 15, 13; -4, 16, 21]
ф
V6 := [Ν + 6*mod(3, Ν) + 1; Ν + 2*mod(4, Ν) + 1; Ν + 8*mod(5, Ν) + 1]
# так как mod выдовал ошибку, что нужны 2 параметра вписала N
sort(V6) = [19; 29; 51]
х
reverse(V6) = [51; 19; 29]
# задание 9
A := [1, 1, 3, 0; 2, 1, 3, 2; 6, 2, 5, -5; -6, -2, -3, 5]
B := [7; 13; 1; 9]
lsolve(A, B) = [1.07692; -9.07692; 5; 2.46154]
