y1(x) := sinh(x)
y2(x) := ln(x)
y3(x) := cosh(x)
Y(x) := ((x - 1)*(x + 4))^2
g(x) := log(x)
y1(x) := sinh(x)
y2(x) := ln(x)
y3(x) := cosh(x)
b(x) := -∞
y(x) := nthroot(x^2, 3)/(x^2 - 1)
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f(x) := limit(y(x)/x, x → ∞)*x + limit(y(x) - x, x → ∞) → -∞
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